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/batch
! ANSYS input file written by Workbench version 2021 R1
! File used for geometry attach: C:\Users\amirm\AppData\Local\Temp\WB_amirm_3172_2\wbnew_files\dp0\SYS-3\DM\SYS-3.agdb
/title,wbnew--Modal (A5)
/com,--- Data in consistent MKS units. See Solving Units in the help system for more information.
/units,MKS
/prep7
! Turn off shape checking because checks already performed inside WB mesher.
! See help system for more information.
SHPP,OFF,,NOWARN
etcon,set             ! allow ANSYS to choose best KEYOP's for 180x elements, resets any applicable keyopt to MAPDL defaults
/com,*********** Nodes for the whole assembly ***********
nblock,3,,1423
(1i9,3e20.9e3)
        1     5.367000000E-02    -2.681200000E-01    -5.367000000E-02
        2     5.367000000E-02    -2.681200000E-01    -1.789000000E-02
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-1
/com,*********** Nodes for all Remote Points ***********
nblock,3
(1i9,3e20.9e3)
     1295     0.000000000E+00     0.000000000E+00     0.000000000E+00
     1296     0.000000000E+00    -1.250000000E-01     0.000000000E+00
     1297     0.000000000E+00    -1.250000000E-01     0.000000000E+00
-1
/com,*********** Elements for Body 1 "Solid" ***********
et,1,186
keyo,1,2,1          ! set full integration on SOLID186
eblock,19,solid,,60
(19i9)
        1        1        1        1        0        0        0        0       20        0      126      794      921      920      900      795      835      857      856
     1059     1292     1272     1058     1062     1163     1205     1063     1057     1164     1207     1206
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-1
/com,*********** Elements for Body 2 "Solid" ***********
et,2,186
keyo,2,2,1          ! set full integration on SOLID186
eblock,19,solid,,125
(19i9)
        2        2        2        2        0        0        0        0       20        0        1        1      184      193      197       80      191      192      213
      221      707      720      222      495      716      718      496      220      706      717      728
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-1
/com,*********** Send User Defined Coordinate System(s) ***********
csys,0
toffst,273.15,  ! Temperature offset from absolute zero
/com,*********** Set Reference Temperature ***********
tref,22.
/com,*********** Send Materials ***********
MP,DENS,1,2700,	! kg m^-3
MP,EX,1,72000000000,	! Pa
MP,NUXY,1,0.289,

MP,DENS,2,2700,	! kg m^-3
MP,EX,2,72000000000,	! Pa
MP,NUXY,2,0.289,

!************************* Model Summary ********************
!Solid,	Assuming Material,	matid,	1
!Solid,	Assuming Material,	matid,	2
!************************* End Model Summary ********************
/com,*********** Fixed Supports ***********
CMBLOCK,_FIXEDSU,NODE,       18
(8i10)
       835       836       857       878       899       920       921       922
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cmsel,s,_FIXEDSU
d,all,all
nsel,all
/com,*********** Create Remote Point "Internal Remote Point 3" ***********
! -------- Remote Point Used by "Remote Displacement" --------
*set,tid,4
*set,cid,3
et,cid,174
et,tid,170
keyo,tid,2,1               ! Don't fix the pilot node
keyo,tid,4,111111
keyo,cid,12,5              ! Bonded Contact
keyo,cid,4,1               ! Deformable RBE3 style load
keyo,cid,2,2               ! MPC style contact
eblock,10,,,150
(15i9)
      506        3        3        3        0      196      172      102      101      683      549      546      547
      507        3        3        3        0      195      176      172      196      691      682      683      723
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-1
*set,_npilot,1297
_npilot124=_npilot
type,tid
mat ,cid
real,cid
tshape,pilo
en,656,_npilot
tshape
/com,*********** Create Remote Point "Internal Remote Point" ***********
! -------- Remote Point Used by "Longitudinal - Solid To Solid" --------
*set,tid,6
*set,cid,5
et,cid,174
et,tid,170
keyo,tid,2,1               ! Don't fix the pilot node
keyo,tid,4,111111
keyo,cid,12,5              ! Bonded Contact
keyo,cid,4,2               ! Rigid CERIG style load
keyo,cid,2,2               ! MPC style contact
eblock,10,,,3
(15i9)
      657        5        5        5        0      919      923      833      837     1291     1159     1158     1168
      658        5        5        5        0      923      924      834      833     1294     1161     1157     1159
      659        5        5        5        0      924      898      858      834     1269     1209     1160     1161
-1
*set,_npilot,1295
_npilot81=_npilot
type,tid
mat ,cid
real,cid
tshape,pilo
en,660,_npilot
tshape
/com,*********** Create Remote Point "Internal Remote Point 2" ***********
! -------- Remote Point Used by "Longitudinal - Solid To Solid" --------
*set,tid,8
*set,cid,7
et,cid,174
et,tid,170
keyo,tid,2,1               ! Don't fix the pilot node
keyo,tid,4,111111
keyo,cid,12,5              ! Bonded Contact
keyo,cid,4,2               ! Rigid CERIG style load
keyo,cid,2,2               ! MPC style contact
eblock,10,,,25
(15i9)
      661        7        7        7        0      171      147      107      106      638      559      556      557
      662        7        7        7        0      170      151      147      171      646      637      638      678
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-1
*set,_npilot,1296
_npilot82=_npilot
type,tid
mat ,cid
real,cid
tshape,pilo
en,686,_npilot
tshape
/com,*********** Create Spring Connection "Longitudinal - Solid To Solid" ***********
*set,_sid,9
et,_sid,14            ! Combin14, Spring-Damper Element
mat,_sid
real,_sid
type,_sid
keyo,_sid,3,0           ! longitudinal  spring/damper
r,_sid,100000.,0.
en,502,1295,1296
/com,*********** Construct Remote Displacement ***********

*DIM,_loadvari123ux,TABLE,1,1,1,TIME,
! Time values
_loadvari123ux(1,0,1) = 1.
! Load values
_loadvari123ux(1,1,1) = 0.


*DIM,_loadvari123uz,TABLE,1,1,1,TIME,
! Time values
_loadvari123uz(1,0,1) = 1.
! Load values
_loadvari123uz(1,1,1) = 0.


*DIM,_loadvari123rotx,TABLE,1,1,1,TIME,
! Time values
_loadvari123rotx(1,0,1) = 1.
! Load values
_loadvari123rotx(1,1,1) = 0.


*DIM,_loadvari123roty,TABLE,1,1,1,TIME,
! Time values
_loadvari123roty(1,0,1) = 1.
! Load values
_loadvari123roty(1,1,1) = 0.


*DIM,_loadvari123rotz,TABLE,1,1,1,TIME,
! Time values
_loadvari123rotz(1,0,1) = 1.
! Load values
_loadvari123rotz(1,1,1) = 0.

d,1297,ux,%_loadvari123ux%
d,1297,uz,%_loadvari123uz%
d,1297,rotx,%_loadvari123rotx%
d,1297,roty,%_loadvari123roty%
d,1297,rotz,%_loadvari123rotz%

/COM,*** Create a component for all remote displacements ***
CMBLOCK,REMOTEDISPALL,NODE,        1
(8i10)
      1297

fini
/solu
antype,2                   ! modal analysis
_thickRatio=0.5     ! Ratio of thick parts in the model
modopt,lanb,6
outres,erase
outres,all,none
outres,nsol,all
outres,etmp,all
esel,s,type,,9
cm,_elmisc,elem
esel,all
outres,misc,all,_elmisc
mxpand,,,,yes,,no             ! expand requested element results, but not write them to file.mode
dmpopt,esav,no
dmpopt,emat,no
dmpopt,full,no
! *********** WB SOLVE COMMAND ***********
! check interactive state
*get,ANSINTER_,active,,int
*if,ANSINTER_,ne,0,then
/eof
*endif
solve
/com *************** Write FE CONNECTORS *********
CEWRITE,file,ce,,INTE
*get,_nmodalsolproc,active,0,numcpu
fini
/post1
*dim,_direction,CHAR,6,1
_direction(1) = 'X'
_direction(2) = 'Y'
_direction(3) = 'Z'
_direction(4) = 'ROTX'
_direction(5) = 'ROTY'
_direction(6) = 'ROTZ'
*get,_lastLS,active,0,set,LSTP
*get,_beginset,active,0,set,nset,first,_lastLS
*get,_endset,active,0,set,nset,last,_lastLS
_nummodes = 0
*if,_endset,gt,0,then
_nummodes = _endset - _beginset + 1
*endif
*do,i_mode,1,_nummodes
   *do,j_component,1,6
			*get,PFACT_%i_mode%_%j_component%,MODE,%i_mode%,PFACT,,DIREC,_direction(%j_component%)
   *enddo
*enddo
*dim,_tmdirection,CHAR,6,1
_tmdirection(1) = 'X'
_tmdirection(2) = 'Y'
_tmdirection(3) = 'Z'
_tmdirection(4) = 'X'
_tmdirection(5) = 'Y'
_tmdirection(6) = 'Z'
*do,j_component,1,6
    *if,j_component,gt,3,then
        *get,TOTALMASS_%j_component%,ELEM,0,IOR,_tmdirection(%j_component%)
    *else
        *get,TOTALMASS_%j_component%,ELEM,0,MTOT,_tmdirection(%j_component%)
    *endif
*enddo
fini
