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/batch
! ANSYS input file written by Workbench version 2021 R1
! File used for geometry attach: C:\Users\amirm\AppData\Local\Temp\WB_amirm_3172_2\wbnew_files\dp0\SYS-3\DM\SYS-3.agdb
/title,wbnew--Harmonic Response (B5)
/com,--- Data in consistent MKS units. See Solving Units in the help system for more information.
/units,MKS
/prep7
! Turn off shape checking because checks already performed inside WB mesher.
! See help system for more information.
SHPP,OFF,,NOWARN
etcon,set             ! allow ANSYS to choose best KEYOP's for 180x elements, resets any applicable keyopt to MAPDL defaults
/com,*********** Nodes for the whole assembly ***********
nblock,3,,1423
(1i9,3e20.9e3)
        1     5.367000000E-02    -2.681200000E-01    -5.367000000E-02
        2     5.367000000E-02    -2.681200000E-01    -1.789000000E-02
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-1
/com,*********** Nodes for all Remote Points ***********
nblock,3
(1i9,3e20.9e3)
     1295     0.000000000E+00     0.000000000E+00     0.000000000E+00
     1296     0.000000000E+00    -1.250000000E-01     0.000000000E+00
     1297     0.000000000E+00    -1.250000000E-01     0.000000000E+00
     1298     0.000000000E+00    -1.250000000E-01     0.000000000E+00
-1
/com,*********** Elements for Body 1 "Solid" ***********
et,1,186
keyo,1,2,1          ! set full integration on SOLID186
eblock,19,solid,,60
(19i9)
        1        1        1        1        0        0        0        0       20        0      126      794      921      920      900      795      835      857      856
     1059     1292     1272     1058     1062     1163     1205     1063     1057     1164     1207     1206
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-1
/com,*********** Elements for Body 2 "Solid" ***********
et,2,186
keyo,2,2,1          ! set full integration on SOLID186
eblock,19,solid,,125
(19i9)
        2        2        2        2        0        0        0        0       20        0        1        1      184      193      197       80      191      192      213
      221      707      720      222      495      716      718      496      220      706      717      728
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-1
/com,*********** Send User Defined Coordinate System(s) ***********
csys,0
toffst,273.15,  ! Temperature offset from absolute zero
/com,*********** Set Reference Temperature ***********
tref,22.
/com,*********** Send Materials ***********
MP,DENS,1,2700,	! kg m^-3
MP,EX,1,72000000000,	! Pa
MP,NUXY,1,0.289,

MP,DENS,2,2700,	! kg m^-3
MP,EX,2,72000000000,	! Pa
MP,NUXY,2,0.289,

!************************* Model Summary ********************
!Solid,	Assuming Material,	matid,	1
!Solid,	Assuming Material,	matid,	2
!************************* End Model Summary ********************
/com,*********** Fixed Supports ***********
CMBLOCK,_FIXEDSU,NODE,       18
(8i10)
       835       836       857       878       899       920       921       922
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cmsel,s,_FIXEDSU
d,all,all
nsel,all
/com,*********** Define Force Using Surface Effect Elements ***********
local,12,0,0.,0.,0.,0.,0.,0.
csys,0
et,3,154
eblock,10,,,3
(15i9)
      507        3        3        3       12      919      923      833      837     1291     1159     1158     1168
      508        3        3        3       12      923      924      834      833     1294     1161     1157     1159
      509        3        3        3       12      924      898      858      834     1269     1209     1160     1161
-1
esel,s,type,,3
keyop,3,2,1                ! Apply load in local coordinate system
keyop,3,7,1                ! Use original area so load is constant in large deformation
esel,all

*DIM,_loadvari51x,TABLE,1,1,1,TIME,
! Time values
_loadvari51x(1,0,1) = 1.
! Load values
_loadvari51x(1,1,1) = 0.


*DIM,_loadvari51xi,TABLE,1,1,1,TIME,
! Time values
_loadvari51xi(1,0,1) = 1.
! Load values
_loadvari51xi(1,1,1) = 0.


*DIM,_loadvari51y,TABLE,1,1,1,TIME,
! Time values
_loadvari51y(1,0,1) = 1.
! Load values
_loadvari51y(1,1,1) = -20000.0000000015


*DIM,_loadvari51yi,TABLE,1,1,1,TIME,
! Time values
_loadvari51yi(1,0,1) = 1.
! Load values
_loadvari51yi(1,1,1) = 0.


*DIM,_loadvari51z,TABLE,1,1,1,TIME,
! Time values
_loadvari51z(1,0,1) = 1.
! Load values
_loadvari51z(1,1,1) = 0.


*DIM,_loadvari51zi,TABLE,1,1,1,TIME,
! Time values
_loadvari51zi(1,0,1) = 1.
! Load values
_loadvari51zi(1,1,1) = 0.

/com,*********** Create Remote Point "Internal Remote Point 3" ***********
! -------- Remote Point Used by "Remote Displacement" --------
*set,tid,5
*set,cid,4
et,cid,174
et,tid,170
keyo,tid,2,1               ! Don't fix the pilot node
keyo,tid,4,111111
keyo,cid,12,5              ! Bonded Contact
keyo,cid,4,1               ! Deformable RBE3 style load
keyo,cid,2,2               ! MPC style contact
eblock,10,,,150
(15i9)
      510        4        4        4        0      196      172      102      101      683      549      546      547
      511        4        4        4        0      195      176      172      196      691      682      683      723
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-1
*set,_npilot,1298
_npilot127=_npilot
type,tid
mat ,cid
real,cid
tshape,pilo
en,660,_npilot
tshape
/com,*********** Create Remote Point "Internal Remote Point" ***********
! -------- Remote Point Used by "Longitudinal - Solid To Solid" --------
*set,tid,7
*set,cid,6
et,cid,174
et,tid,170
keyo,tid,2,1               ! Don't fix the pilot node
keyo,tid,4,111111
keyo,cid,12,5              ! Bonded Contact
keyo,cid,4,2               ! Rigid CERIG style load
keyo,cid,2,2               ! MPC style contact
eblock,10,,,3
(15i9)
      661        6        6        6        0      919      923      833      837     1291     1159     1158     1168
      662        6        6        6        0      923      924      834      833     1294     1161     1157     1159
      663        6        6        6        0      924      898      858      834     1269     1209     1160     1161
-1
*set,_npilot,1295
_npilot81=_npilot
type,tid
mat ,cid
real,cid
tshape,pilo
en,664,_npilot
tshape
/com,*********** Create Remote Point "Internal Remote Point 2" ***********
! -------- Remote Point Used by "Longitudinal - Solid To Solid" --------
*set,tid,9
*set,cid,8
et,cid,174
et,tid,170
keyo,tid,2,1               ! Don't fix the pilot node
keyo,tid,4,111111
keyo,cid,12,5              ! Bonded Contact
keyo,cid,4,2               ! Rigid CERIG style load
keyo,cid,2,2               ! MPC style contact
eblock,10,,,25
(15i9)
      665        8        8        8        0      171      147      107      106      638      559      556      557
      666        8        8        8        0      170      151      147      171      646      637      638      678
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-1
*set,_npilot,1296
_npilot82=_npilot
type,tid
mat ,cid
real,cid
tshape,pilo
en,690,_npilot
tshape
/com,*********** Construct Remote Displacement ***********

*DIM,_loadvari126ux,TABLE,1,1,1,TIME,
! Time values
_loadvari126ux(1,0,1) = 1.
! Load values
_loadvari126ux(1,1,1) = 0.


*DIM,_loadvari126uz,TABLE,1,1,1,TIME,
! Time values
_loadvari126uz(1,0,1) = 1.
! Load values
_loadvari126uz(1,1,1) = 0.


*DIM,_loadvari126rotx,TABLE,1,1,1,TIME,
! Time values
_loadvari126rotx(1,0,1) = 1.
! Load values
_loadvari126rotx(1,1,1) = 0.


*DIM,_loadvari126roty,TABLE,1,1,1,TIME,
! Time values
_loadvari126roty(1,0,1) = 1.
! Load values
_loadvari126roty(1,1,1) = 0.


*DIM,_loadvari126rotz,TABLE,1,1,1,TIME,
! Time values
_loadvari126rotz(1,0,1) = 1.
! Load values
_loadvari126rotz(1,1,1) = 0.

d,1298,ux,%_loadvari126ux%
d,1298,uz,%_loadvari126uz%
d,1298,rotx,%_loadvari126rotx%
d,1298,roty,%_loadvari126roty%
d,1298,rotz,%_loadvari126rotz%

/COM,*** Create a component for all remote displacements ***
CMBLOCK,REMOTEDISPALL,NODE,        1
(8i10)
      1298

/com,*********** Create Spring Connection "Longitudinal - Solid To Solid" ***********
*set,_sid,10
et,_sid,14            ! Combin14, Spring-Damper Element
mat,_sid
real,_sid
type,_sid
keyo,_sid,3,0           ! longitudinal  spring/damper
r,_sid,100000.,0.
en,502,1295,1296
fini
/com,*********** Performing Modal Solve ***********
/solu
antype,2
modcontrol,on
thexpand,off     ! ignore thermal strains
mxpand,,,,yes,,no     ! expand element results for stress/strains, but not write them to file.mode
outres,erase
outres,all,none
outres,nsol,all
outres,eangl,all
outres,etmp,all
outres,veng,all
outres,strs,all
outres,epel,all
outres,rsol,all
outres,cont,all
esel,s,type,,10
cm,_elmisc,elem
esel,all
outres,misc,all,_elmisc
modopt,lanb,200,0.,30.
fdele,all,all
sfdele,all,all
sfedele,all,all,all
acel,0,0,0                 ! zero out the acceleration
/com,*********** Setting and Solving Each Load Step ***********
esel,s,type,,3
nsle
sfe,all,2,pres,1,1
nsel,all
esel,all
solve
/com,**********************
/com *************** Write FE CONNECTORS *********
CEWRITE,file,ce,,INTE
fini
/com,*********** Performing MSUP Harmonic Solve ***********
/solu
antype,harm
hropt,msup
thexpand,off     ! ignore thermal strains
hrout,off
kbc,1
harfrq,0.000000,15.000000
nsub,100
fdele,all,all
sfdele,all,all
sfedele,all,all,all
acel,0,0,0                 ! zero out the acceleration
lvscale,0,1
/com,*********** Scaling Each Load Step for MSUP Solve ***********
lvscale,%_loadvari51y%,1
! *********** WB SOLVE COMMAND ***********
! check interactive state
*get,ANSINTER_,active,,int
*if,ANSINTER_,ne,0,then
/eof
*endif
solve

fini
! ------- MSUP EXPANSION PASS -------
/solu
expass,on
hrexp,all
outres,erase
outres,all,none
outres,nsol,all
outres,eangl,all
outres,etmp,all
outres,veng,all
outres,strs,all
outres,epel,all
outres,rsol,all
outres,cont,all
outres,misc,all,_elmisc
numexp,all,,,yes        ! expand results at all freq. and calculate requested result items
! *********** WB SOLVE COMMAND ***********
! check interactive state
*get,ANSINTER_,active,,int
*if,ANSINTER_,ne,0,then
/eof
*endif
solve
/com *************** Write FE CONNECTORS *********
CEWRITE,file,ce,,INTE
fini
/post1
fini
